FINISH

/PREP7

! ### Geometry Details ###
! - use double symmetry
! - length axis: x
! - height axis: y
! - width axis: z
! - symmetry plane at (x=0,z=0)
! - y=0 at the bottom of the beam (concrete bottom)

! ### Volume creation ###
! Create concrete block (complete volume, cut later)
BLOCK,-length_span/2-length_cant,0,0,height_tot,-depth_tot/2,0
! Create support block
BLOCK,-length_span/2-width_supp/2,-length_span/2+width_supp/2,-height_supp,0,-depth_tot/2,0
! Create load block
BLOCK,-length_load-width_load/2,-length_load+width_load/2,height_tot,height_tot+height_load,-depth_tot/2,0

! Create working plane for cutting
CSWPLA,9999,0

! Move WP in y to cut volume...
! ...at lower reinforcement layer
WPCSYS,9999						! activate
WPOFFS,0,height_cover,0			! move
WPROTA,0,90,0					! rotate
VSBW,all,,delete				! cute and keep

! ...at upper reinforcement layer
WPCSYS,9999
WPOFFS,0,height_tot-height_cover,0
WPROTA,0,90,0
VSBW,all,,delete

! Move WP in z to cut volume...
! ...at stirrup position
WPCSYS,9999
WPOFFS,0,0,-depth_tot/2+width_cover
WPROTA,90,0,0
VSBW,all,,delete

! Move WP in x to cut volume...
! ...at stirrup position along length - first after 6cm
WPCSYS,9999
WPOFFS,-length_span/2-length_cant+x_stirrup_1,0,0
WPROTA,0,0,90
VSBW,all,,delete
! ...at stirrup position along length - second after 6cm+16,5cm
WPCSYS,9999
WPOFFS,-length_span/2-length_cant+x_stirrup_1+x_stirrup_2,0,0
WPROTA,0,0,90
VSBW,all,,delete
! ...at stirrup position along length - others with 12cm spacing (+additional cut for last bit of the upper reinforcement)
*DO,i,1,num_cuts_12cm,1
	WPCSYS,9999
	WPOFFS,-length_span/2-length_cant+x_stirrup_1+x_stirrup_2+x_stirrup_3*i,0,0
	WPROTA,0,0,90
	VSBW,all,,delete
*ENDDO
ALLSEL

! Move WP to cut at support plate positions
WPCSYS,9999
WPOFFS,-length_span/2-width_supp/2,0,0
WPROTA,0,0,90
VSBW,all,,delete
WPCSYS,9999
WPOFFS,-length_span/2+width_supp/2,0,0
WPROTA,0,0,90
VSBW,all,,delete
! Move WP to cut at load plate positions
WPCSYS,9999
WPOFFS,-length_load-width_load/2,0,0
WPROTA,0,0,90
VSBW,all,,delete
WPCSYS,9999
WPOFFS,-length_load+width_load/2,0,0
WPROTA,0,0,90
VSBW,all,,delete

! Switch back to original csys
CSYS,0
WPCSYS,0
! Create components
VSEL,s,loc,y,0,height_tot
CM,volu_concrete,volu
ALLSEL
VSEL,s,loc,y,height_tot,height_tot+height_load
CM,volu_load,volu
ALLSEL
VSEL,s,loc,y,-height_supp,0
CM,volu_supp,volu
ALLSEL

! ### Line division for meshing ###
! Use specified div length
LESIZE,all,ele_length
ALLSEL

! ### Start defining components ###
! lower reinforcement
LSEL,s,loc,z,-depth_tot/2+width_cover
LSEL,r,loc,y,height_cover
CM,line_reinf_lower,line
ALLSEL

! upper reinforcement (not over the entire length of the beam!)
LSEL,s,loc,z,-depth_tot/2+width_cover
LSEL,r,loc,y,height_tot-height_cover
LSEL,r,loc,x,-length_span/2-length_cant,-length_span/2-length_cant+x_stirrup_1+x_stirrup_2+x_stirrup_3*num_cuts_12cm
CM,line_reinf_upper,line
ALLSEL

! stirrup vertical
LSEL,s,loc,z,-depth_tot/2+width_cover
LSEL,r,loc,x,-length_span/2-length_cant,-length_span/2-length_cant+x_stirrup_1+x_stirrup_2+x_stirrup_3*(num_cuts_12cm-1)
LSEL,u,loc,y,0,height_cover
LSEL,u,loc,y,height_tot-height_cover,height_tot
LSEL,u,loc,x,-length_span/2-length_cant
LSEL,u,loc,x,-length_span/2-width_supp/2
LSEL,u,loc,x,-length_span/2+width_supp/2
LSEL,u,loc,x,-length_load-width_load/2
LSEL,u,loc,x,-length_load+width_load/2
LSEL,u,loc,y,height_tot,height_tot+height_load
LSEL,u,loc,y,-height_supp,0
CM,line_reinf_stir_v,line
ALLSEL

! stirrup horizontal lower
LSEL,s,loc,y,height_cover
LSEL,r,loc,x,-length_span/2-length_cant,-length_span/2-length_cant+x_stirrup_1+x_stirrup_2+x_stirrup_3*(num_cuts_12cm-1)
LSEL,u,loc,z,-depth_tot/2,-depth_tot/2+width_cover
LSEL,u,loc,z,0
LSEL,u,loc,x,-length_span/2-length_cant
LSEL,u,loc,x,-length_span/2-width_supp/2
LSEL,u,loc,x,-length_span/2+width_supp/2
LSEL,u,loc,x,-length_load-width_load/2
LSEL,u,loc,x,-length_load+width_load/2
LSEL,u,loc,y,height_tot,height_tot+height_load
LSEL,u,loc,y,-height_supp,0
CM,line_reinf_stir_hl,line
ALLSEL

! stirrup horizontal upper
LSEL,s,loc,y,height_tot-height_cover
LSEL,r,loc,x,-length_span/2-length_cant,-length_span/2-length_cant+x_stirrup_1+x_stirrup_2+x_stirrup_3*(num_cuts_12cm-1)
LSEL,u,loc,z,-depth_tot/2,-depth_tot/2+width_cover
LSEL,u,loc,z,0
LSEL,u,loc,x,-length_span/2-length_cant
LSEL,u,loc,x,-length_span/2-width_supp/2
LSEL,u,loc,x,-length_span/2+width_supp/2
LSEL,u,loc,x,-length_load-width_load/2
LSEL,u,loc,x,-length_load+width_load/2
LSEL,u,loc,y,height_tot,height_tot+height_load
LSEL,u,loc,y,-height_supp,0
CM,line_reinf_stir_hu,line
ALLSEL

! Group stirrup components
CMGRP,line_reinf_stir,line_reinf_stir_v,line_reinf_stir_hl,line_reinf_stir_hu

! ### Define element types for concrete, reinforcement and others
! Concrete matrix
*IF,switch_model,eq,0,then ! DP using SOLID185
	ET,1,SOLID185						! volume element SOLID185
	KEYOPT,1,2,0						! full integration
*ELSEIF,switch_model,eq,1,then ! Microplane using CPT215
	ET,1,CPT215							! Coupled-Pore-Pressure-Thermal Mechanical Solid with 2 extra DOFs
	KEYOPT,1,18,2						! activates the 2 extra DOFs
	ET,10,SOLID185
	KEYOPT,10,2,0
*ELSE
	*MSG,'Unkwon model selected'
	/EOF
*ENDIF

! Reinforcement
ET,2,LINK180							! link element (no bending/rotation) LINK180
! Lower
A_l	= PI/4*diam_reinf_lower**2
SECTYPE,2,link							! cross-section
SECDATA,A_l
! Upper
A_u	= PI/4*diam_reinf_upper**2
SECTYPE,3,link							! cross-section
SECDATA,A_u
! Stirrup
A_s	= PI/4*diam_reinf_stir**2
SECTYPE,4,link							! cross-section
SECDATA,A_s

! Rigid body for support
ET,5,TARGE170							! target element
KEYOPT,5,2,1							! BC's for rigid target nodes constrained by user
KEYOPT,5,4,111111						! all DOFs
R,5

! Rigid body for load
ET,6,TARGE170							! target element
KEYOPT,6,2,1							! BC's for rigid target nodes constrained by user
KEYOPT,6,4,111111						! all DOFs
R,6

! ### Read material ###
/INPUT,'material',mac

! ### Meshing ###
! Concrete volume
TYPE,1
MAT,1
REAL,1

MSHKEY,1								! mapped meshing
VSEL,s,,,volu_concrete
VMESH,all
ALLSEL

! Support and load plate
TYPE,10
MAT,3

MSHKEY,1
VSEL,u,,,volu_concrete
VMESH,all
ALLSEL

! Lower reinforcement
TYPE,2
MAT,2
SECNUM,2

CMSEL,s,line_reinf_lower,line
LMESH,all
ALLSEL

! Upper reinforcement
TYPE,2
MAT,2
SECNUM,3

CMSEL,s,line_reinf_upper,line
LMESH,all
ALLSEL

! Stirrup reinforcement
TYPE,2
MAT,2
SECNUM,4

CMSEL,s,line_reinf_stir,line
LMESH,all
ALLSEL

! ### Merge all nodes at identical positions ###
! CMSEL,u,volu_supp,volu
! CMSEL,u,volu_load,volu
! NSLV,s
NUMMRG,node
NUMMRG,kp
ALLSEL

! Fix display, add translucency for concrete
/ESHAPE,1
ESEL,s,TYPE,,1
/TRLCY,elem,0.5
ALLSEL
/VIEW,1,1,1,1
/ANGLE,1
/AUTO,1
/REPLOT

! ### Pilot node for support
! Rigid body
TYPE,5									! TYPE = 5 is set (Target)
REAL,5									! REAL = 5 is set (for rigid body)

N,,-length_span/2,-height_supp,0		! z was depth_tot/4 for middle of the area, z=0 equals true middle in the symmetry plane
*GET,node_support,node,0,num,max
NSEL,s,loc,y,-height_supp
ESLN
ESURF
ALLSEL

TSHAP,pilo
! *GET,node_support,node,0,num,max
E,node_support
ALLSEL

! ### Pilot node for load
! Rigid body
TYPE,6									! TYPE = 5 is set (Target)
REAL,6									! REAL = 5 is set (for rigid body)

N,,-length_load,height_tot+height_load,0		! z was depth_tot/4 for middle of the area, z=0 equals true middle in the symmetry plane
*GET,node_load,node,0,num,max
NSEL,s,loc,y,height_tot+height_load
ESLN
ESURF
ALLSEL

TSHAP,pilo
! *GET,node_support,node,0,num,max
E,node_load
ALLSEL

SAVE,prep_%filname%,db,,all
